# OpenSim document version 40000
Model Tendon_Branch_Count_6:
  gravity: 0 0 0
  TableReporter__double_ reporter: report_time_interval=0.001 [s]
      input_inputs=(/jointset/ground_link1/ground_link1_rz|value(ground_link1_rz) /jointset/link1_link2/link1_link2_rz|value(link1_link2_rz) /jointset/link2_link3/link2_link3_rz|value(link2_link3_rz) /jointset/link3_link4/link3_link4_rz|value(link3_link4_rz) /jointset/link4_link5/link4_link5_rz|value(link4_link5_rz) /jointset/link5_link6/link5_link6_rz|value(link5_link6_rz) /jointset/link6_link7/link6_link7_rz|value(link6_link7_rz) /jointset/link7_link8/link7_link8_rz|value(link7_link8_rz))
  Ground
  BodySet:
    Body link1: mass=0.1 [kg] mass_center=(0 0 0) inertia=(0.0003489583 3.125e-5 0.0003489583 0 0 0)
      Cylinder link1_geom_1: radius=0.025 half_height=0.1
    Body link2: mass=0.1 mass_center=(0 0 0) inertia=(0.0003489583 3.125e-5 0.0003489583 0 0 0)
      Cylinder link2_geom_1: radius=0.025 half_height=0.1
    Body link3: mass=0.1 mass_center=(0 0 0) inertia=(0.0003489583 3.125e-5 0.0003489583 0 0 0)
      Cylinder link3_geom_1: radius=0.025 half_height=0.1
    Body link4: mass=0.1 mass_center=(0 0 0) inertia=(0.0003489583 3.125e-5 0.0003489583 0 0 0)
      Cylinder link4_geom_1: radius=0.025 half_height=0.1
    Body link5: mass=0.1 mass_center=(0 0 0) inertia=(0.0003489583 3.125e-5 0.0003489583 0 0 0)
      Cylinder link5_geom_1: radius=0.025 half_height=0.1
    Body link6: mass=0.1 mass_center=(0 0 0) inertia=(0.0003489583 3.125e-5 0.0003489583 0 0 0)
      Cylinder link6_geom_1: radius=0.025 half_height=0.1
    Body link7: mass=0.1 mass_center=(0 0 0) inertia=(0.0003489583 3.125e-5 0.0003489583 0 0 0)
      Cylinder link7_geom_1: radius=0.025 half_height=0.1
    Body link8: mass=0.1 mass_center=(0 0 0) inertia=(0.0003489583 3.125e-5 0.0003489583 0 0 0)
      Cylinder link8_geom_1: radius=0.025 half_height=0.1
  JointSet:
    CustomJoint ground_link1: socket_parent_frame=ground_offset socket_child_frame=link1_offset
      CoordinateLimitForce ground_link1_rz_LimitForce: coordinate=ground_link1_rz upper_stiffness=0.2 [N*m/degree]
          upper_limit=36 [degrees] lower_stiffness=-0.2 [N*m/degree] lower_limit=-36 [degrees] damping=0.4
          transition=9 [degrees] compute_dissipation_energy=false
      Coordinate ground_link1_rz: range=(-0.7853982 0.7853982)
      PhysicalOffsetFrame ground_offset: socket_parent=/ground translation=(0 1.775 0) [meters]
      PhysicalOffsetFrame link1_offset: socket_parent=/bodyset/link1 translation=(0 0.1125 0)
      SpatialTransform:
        TransformAxis rotation1: axis=(1 0 0)
        TransformAxis rotation2: axis=(0 1 0)
        TransformAxis rotation3: coordinates=ground_link1_rz axis=(0 0 1) LinearFunction(coefficients=1 0)
        TransformAxis translation1: axis=(1 0 0)
        TransformAxis translation2: axis=(0 1 0)
        TransformAxis translation3: axis=(0 0 1)
    CustomJoint link1_link2: socket_parent_frame=link1_offset socket_child_frame=link2_offset
      CoordinateLimitForce link1_link2_rz_LimitForce: coordinate=link1_link2_rz upper_stiffness=0.2 upper_limit=36
          lower_stiffness=-0.2 lower_limit=-36 damping=0.4 transition=9 compute_dissipation_energy=false
      Coordinate link1_link2_rz: range=(-0.7853982 0.7853982)
      PhysicalOffsetFrame link1_offset: socket_parent=/bodyset/link1 translation=(0 -0.1125 0)
      PhysicalOffsetFrame link2_offset: socket_parent=/bodyset/link2 translation=(0 0.1125 0)
      SpatialTransform:
        TransformAxis rotation1: axis=(1 0 0)
        TransformAxis rotation2: axis=(0 1 0)
        TransformAxis rotation3: coordinates=link1_link2_rz axis=(0 0 1) LinearFunction(coefficients=1 0)
        TransformAxis translation1: axis=(1 0 0)
        TransformAxis translation2: axis=(0 1 0)
        TransformAxis translation3: axis=(0 0 1)
    CustomJoint link2_link3: socket_parent_frame=link2_offset socket_child_frame=link3_offset
      CoordinateLimitForce link2_link3_rz_LimitForce: coordinate=link2_link3_rz upper_stiffness=0.2 upper_limit=36
          lower_stiffness=-0.2 lower_limit=-36 damping=0.4 transition=9 compute_dissipation_energy=false
      Coordinate link2_link3_rz: range=(-0.7853982 0.7853982)
      PhysicalOffsetFrame link2_offset: socket_parent=/bodyset/link2 translation=(0 -0.1125 0)
      PhysicalOffsetFrame link3_offset: socket_parent=/bodyset/link3 translation=(0 0.1125 0)
      SpatialTransform:
        TransformAxis rotation1: axis=(1 0 0)
        TransformAxis rotation2: axis=(0 1 0)
        TransformAxis rotation3: coordinates=link2_link3_rz axis=(0 0 1) LinearFunction(coefficients=1 0)
        TransformAxis translation1: axis=(1 0 0)
        TransformAxis translation2: axis=(0 1 0)
        TransformAxis translation3: axis=(0 0 1)
    CustomJoint link3_link4: socket_parent_frame=link3_offset socket_child_frame=link4_offset
      CoordinateLimitForce link3_link4_rz_LimitForce: coordinate=link3_link4_rz upper_stiffness=0.2 upper_limit=36
          lower_stiffness=-0.2 lower_limit=-36 damping=0.4 transition=9 compute_dissipation_energy=false
      Coordinate link3_link4_rz: range=(-0.7853982 0.7853982)
      PhysicalOffsetFrame link3_offset: socket_parent=/bodyset/link3 translation=(0 -0.1125 0)
      PhysicalOffsetFrame link4_offset: socket_parent=/bodyset/link4 translation=(0 0.1125 0)
      SpatialTransform:
        TransformAxis rotation1: axis=(1 0 0)
        TransformAxis rotation2: axis=(0 1 0)
        TransformAxis rotation3: coordinates=link3_link4_rz axis=(0 0 1) LinearFunction(coefficients=1 0)
        TransformAxis translation1: axis=(1 0 0)
        TransformAxis translation2: axis=(0 1 0)
        TransformAxis translation3: axis=(0 0 1)
    CustomJoint link4_link5: socket_parent_frame=link4_offset socket_child_frame=link5_offset
      CoordinateLimitForce link4_link5_rz_LimitForce: coordinate=link4_link5_rz upper_stiffness=0.2 upper_limit=36
          lower_stiffness=-0.2 lower_limit=-36 damping=0.4 transition=9 compute_dissipation_energy=false
      Coordinate link4_link5_rz: range=(-0.7853982 0.7853982)
      PhysicalOffsetFrame link4_offset: socket_parent=/bodyset/link4 translation=(0 -0.1125 0)
      PhysicalOffsetFrame link5_offset: socket_parent=/bodyset/link5 translation=(0 0.1125 0)
      SpatialTransform:
        TransformAxis rotation1: axis=(1 0 0)
        TransformAxis rotation2: axis=(0 1 0)
        TransformAxis rotation3: coordinates=link4_link5_rz axis=(0 0 1) LinearFunction(coefficients=1 0)
        TransformAxis translation1: axis=(1 0 0)
        TransformAxis translation2: axis=(0 1 0)
        TransformAxis translation3: axis=(0 0 1)
    CustomJoint link5_link6: socket_parent_frame=link5_offset socket_child_frame=link6_offset
      CoordinateLimitForce link5_link6_rz_LimitForce: coordinate=link5_link6_rz upper_stiffness=0.2 upper_limit=36
          lower_stiffness=-0.2 lower_limit=-36 damping=0.4 transition=9 compute_dissipation_energy=false
      Coordinate link5_link6_rz: range=(-0.7853982 0.7853982)
      PhysicalOffsetFrame link5_offset: socket_parent=/bodyset/link5 translation=(0 -0.1125 0)
      PhysicalOffsetFrame link6_offset: socket_parent=/bodyset/link6 translation=(0 0.1125 0)
      SpatialTransform:
        TransformAxis rotation1: axis=(1 0 0)
        TransformAxis rotation2: axis=(0 1 0)
        TransformAxis rotation3: coordinates=link5_link6_rz axis=(0 0 1) LinearFunction(coefficients=1 0)
        TransformAxis translation1: axis=(1 0 0)
        TransformAxis translation2: axis=(0 1 0)
        TransformAxis translation3: axis=(0 0 1)
    CustomJoint link6_link7: socket_parent_frame=link6_offset socket_child_frame=link7_offset
      CoordinateLimitForce link6_link7_rz_LimitForce: coordinate=link6_link7_rz upper_stiffness=0.2 upper_limit=36
          lower_stiffness=-0.2 lower_limit=-36 damping=0.4 transition=9 compute_dissipation_energy=false
      Coordinate link6_link7_rz: range=(-0.7853982 0.7853982)
      PhysicalOffsetFrame link6_offset: socket_parent=/bodyset/link6 translation=(0 -0.1125 0)
      PhysicalOffsetFrame link7_offset: socket_parent=/bodyset/link7 translation=(0 0.1125 0)
      SpatialTransform:
        TransformAxis rotation1: axis=(1 0 0)
        TransformAxis rotation2: axis=(0 1 0)
        TransformAxis rotation3: coordinates=link6_link7_rz axis=(0 0 1) LinearFunction(coefficients=1 0)
        TransformAxis translation1: axis=(1 0 0)
        TransformAxis translation2: axis=(0 1 0)
        TransformAxis translation3: axis=(0 0 1)
    CustomJoint link7_link8: socket_parent_frame=link7_offset socket_child_frame=link8_offset
      CoordinateLimitForce link7_link8_rz_LimitForce: coordinate=link7_link8_rz upper_stiffness=0.2 upper_limit=36
          lower_stiffness=-0.2 lower_limit=-36 damping=0.4 transition=9 compute_dissipation_energy=false
      Coordinate link7_link8_rz: range=(-0.7853982 0.7853982)
      PhysicalOffsetFrame link7_offset: socket_parent=/bodyset/link7 translation=(0 -0.1125 0)
      PhysicalOffsetFrame link8_offset: socket_parent=/bodyset/link8 translation=(0 0.1125 0)
      SpatialTransform:
        TransformAxis rotation1: axis=(1 0 0)
        TransformAxis rotation2: axis=(0 1 0)
        TransformAxis rotation3: coordinates=link7_link8_rz axis=(0 0 1) LinearFunction(coefficients=1 0)
        TransformAxis translation1: axis=(1 0 0)
        TransformAxis translation2: axis=(0 1 0)
        TransformAxis translation3: axis=(0 0 1)
  ControllerSet:
    PrescribedController: actuator_list=mtu1
      FunctionSet ControlFunctions:
        StepFunction: transition_start_time=0.1 transition_end_time=1.1 start_value=0.2 end_value=1
    PrescribedController prescribedcontroller_0: actuator_list=mtu2
      FunctionSet ControlFunctions:
        StepFunction: transition_start_time=0.1 transition_end_time=1.1 start_value=0.2 end_value=1
    PrescribedController prescribedcontroller_1: actuator_list=mtu3
      FunctionSet ControlFunctions:
        StepFunction: transition_start_time=0.1 transition_end_time=1.1 start_value=0.2 end_value=1
    PrescribedController prescribedcontroller_2: actuator_list=mtu4
      FunctionSet ControlFunctions:
        StepFunction: transition_start_time=0.1 transition_end_time=1.1 start_value=0.2 end_value=1
    PrescribedController prescribedcontroller_3: actuator_list=mtu5
      FunctionSet ControlFunctions:
        StepFunction: transition_start_time=0.1 transition_end_time=1.1 start_value=0.2 end_value=1
    PrescribedController prescribedcontroller_4: actuator_list=mtu6
      FunctionSet ControlFunctions:
        StepFunction: transition_start_time=0.1 transition_end_time=1.1 start_value=0.2 end_value=1
    PrescribedController prescribedcontroller_5: actuator_list=mtu7
      FunctionSet ControlFunctions:
        StepFunction: transition_start_time=0.1 transition_end_time=1.1 start_value=0.2 end_value=1
  ForceSet:
    Millard2012EquilibriumMuscle [values shared by the 7 below unless stated]: min_control=0.01 max_control=1
        max_isometric_force=0.1428571 optimal_fiber_length=0.158 pennation_angle_at_optimal=0 [radians]
        fiber_damping=0.2 default_fiber_length=0.158
      ActiveForceLengthCurve: minimum_value=0
      ForceVelocityCurve: concentric_slope_at_vmax=0 concentric_slope_near_vmax=0.25 isometric_slope=5
          eccentric_slope_at_vmax=0 eccentric_slope_near_vmax=0.15 max_eccentric_velocity_force_multiplier=1.4
      FiberForceLengthCurve
      TendonForceLengthCurve
    Millard2012EquilibriumMuscle mtu1: tendon_slack_length=0.067
      PathPoint mtu1_pt1: link1 (0.025 0.1 0)
      PathPoint mtu1_pt2: link1 (0.025 -0.058 0)
      PathPoint mtu1_pt3: link1 (0.025 -0.1 0)
      PathPoint mtu1_pt4: link2 (0.025 0.1 0)
    Millard2012EquilibriumMuscle mtu2: tendon_slack_length=0.292
      PathPoint mtu2_pt1: link1 (0.025 0.1 0)
      PathPoint mtu2_pt2: link1 (0.025 -0.058 0)
      PathPoint mtu2_pt3: link1 (0.025 -0.1 0)
      PathPoint mtu2_pt4: link2 (0.025 0.1 0)
      PathPoint mtu2_pt5: link2 (0.025 -0.058 0)
      PathPoint mtu2_pt6: link2 (0.025 -0.1 0)
      PathPoint mtu2_pt7: link3 (0.025 0.1 0)
    Millard2012EquilibriumMuscle mtu3: tendon_slack_length=0.517
      PathPoint mtu3_pt1: link1 (0.025 0.1 0)
      PathPoint mtu3_pt2: link1 (0.025 -0.058 0)
      PathPoint mtu3_pt3: link1 (0.025 -0.1 0)
      PathPoint mtu3_pt4: link2 (0.025 0.1 0)
      PathPoint mtu3_pt5: link2 (0.025 -0.058 0)
      PathPoint mtu3_pt6: link2 (0.025 -0.1 0)
      PathPoint mtu3_pt7: link3 (0.025 0.1 0)
      PathPoint mtu3_pt8: link3 (0.025 -0.058 0)
      PathPoint mtu3_pt9: link3 (0.025 -0.1 0)
      PathPoint mtu3_pt10: link4 (0.025 0.1 0)
    Millard2012EquilibriumMuscle mtu4: tendon_slack_length=0.742
      PathPoint mtu4_pt1: link1 (0.025 0.1 0)
      PathPoint mtu4_pt2: link1 (0.025 -0.058 0)
      PathPoint mtu4_pt3: link1 (0.025 -0.1 0)
      PathPoint mtu4_pt4: link2 (0.025 0.1 0)
      PathPoint mtu4_pt5: link2 (0.025 -0.058 0)
      PathPoint mtu4_pt6: link2 (0.025 -0.1 0)
      PathPoint mtu4_pt7: link3 (0.025 0.1 0)
      PathPoint mtu4_pt8: link3 (0.025 -0.058 0)
      PathPoint mtu4_pt9: link3 (0.025 -0.1 0)
      PathPoint mtu4_pt10: link4 (0.025 0.1 0)
      PathPoint mtu4_pt11: link4 (0.025 -0.058 0)
      PathPoint mtu4_pt12: link4 (0.025 -0.1 0)
      PathPoint mtu4_pt13: link5 (0.025 0.1 0)
    Millard2012EquilibriumMuscle mtu5: tendon_slack_length=0.967
      PathPoint mtu5_pt1: link1 (0.025 0.1 0)
      PathPoint mtu5_pt2: link1 (0.025 -0.058 0)
      PathPoint mtu5_pt3: link1 (0.025 -0.1 0)
      PathPoint mtu5_pt4: link2 (0.025 0.1 0)
      PathPoint mtu5_pt5: link2 (0.025 -0.058 0)
      PathPoint mtu5_pt6: link2 (0.025 -0.1 0)
      PathPoint mtu5_pt7: link3 (0.025 0.1 0)
      PathPoint mtu5_pt8: link3 (0.025 -0.058 0)
      PathPoint mtu5_pt9: link3 (0.025 -0.1 0)
      PathPoint mtu5_pt10: link4 (0.025 0.1 0)
      PathPoint mtu5_pt11: link4 (0.025 -0.058 0)
      PathPoint mtu5_pt12: link4 (0.025 -0.1 0)
      PathPoint mtu5_pt13: link5 (0.025 0.1 0)
      PathPoint mtu5_pt14: link5 (0.025 -0.058 0)
      PathPoint mtu5_pt15: link5 (0.025 -0.1 0)
      PathPoint mtu5_pt16: link6 (0.025 0.1 0)
    Millard2012EquilibriumMuscle mtu6: tendon_slack_length=1.192
      PathPoint mtu6_pt1: link1 (0.025 0.1 0)
      PathPoint mtu6_pt2: link1 (0.025 -0.058 0)
      PathPoint mtu6_pt3: link1 (0.025 -0.1 0)
      PathPoint mtu6_pt4: link2 (0.025 0.1 0)
      PathPoint mtu6_pt5: link2 (0.025 -0.058 0)
      PathPoint mtu6_pt6: link2 (0.025 -0.1 0)
      PathPoint mtu6_pt7: link3 (0.025 0.1 0)
      PathPoint mtu6_pt8: link3 (0.025 -0.058 0)
      PathPoint mtu6_pt9: link3 (0.025 -0.1 0)
      PathPoint mtu6_pt10: link4 (0.025 0.1 0)
      PathPoint mtu6_pt11: link4 (0.025 -0.058 0)
      PathPoint mtu6_pt12: link4 (0.025 -0.1 0)
      PathPoint mtu6_pt13: link5 (0.025 0.1 0)
      PathPoint mtu6_pt14: link5 (0.025 -0.058 0)
      PathPoint mtu6_pt15: link5 (0.025 -0.1 0)
      PathPoint mtu6_pt16: link6 (0.025 0.1 0)
      PathPoint mtu6_pt17: link6 (0.025 -0.058 0)
      PathPoint mtu6_pt18: link6 (0.025 -0.1 0)
      PathPoint mtu6_pt19: link7 (0.025 0.1 0)
    Millard2012EquilibriumMuscle mtu7: tendon_slack_length=1.417
      PathPoint mtu7_pt1: link1 (0.025 0.1 0)
      PathPoint mtu7_pt2: link1 (0.025 -0.058 0)
      PathPoint mtu7_pt3: link1 (0.025 -0.1 0)
      PathPoint mtu7_pt4: link2 (0.025 0.1 0)
      PathPoint mtu7_pt5: link2 (0.025 -0.058 0)
      PathPoint mtu7_pt6: link2 (0.025 -0.1 0)
      PathPoint mtu7_pt7: link3 (0.025 0.1 0)
      PathPoint mtu7_pt8: link3 (0.025 -0.058 0)
      PathPoint mtu7_pt9: link3 (0.025 -0.1 0)
      PathPoint mtu7_pt10: link4 (0.025 0.1 0)
      PathPoint mtu7_pt11: link4 (0.025 -0.058 0)
      PathPoint mtu7_pt12: link4 (0.025 -0.1 0)
      PathPoint mtu7_pt13: link5 (0.025 0.1 0)
      PathPoint mtu7_pt14: link5 (0.025 -0.058 0)
      PathPoint mtu7_pt15: link5 (0.025 -0.1 0)
      PathPoint mtu7_pt16: link6 (0.025 0.1 0)
      PathPoint mtu7_pt17: link6 (0.025 -0.058 0)
      PathPoint mtu7_pt18: link6 (0.025 -0.1 0)
      PathPoint mtu7_pt19: link7 (0.025 0.1 0)
      PathPoint mtu7_pt20: link7 (0.025 -0.058 0)
      PathPoint mtu7_pt21: link7 (0.025 -0.1 0)
      PathPoint mtu7_pt22: link8 (0.025 0.1 0)
