# OpenSim document version 40000
Model Tendon_Branch_Count_6:
  gravity: 0 0 0
  TableReporter__double_ reporter: report_time_interval=0.001 [s]
      input_inputs=(/jointset/ground_link1/ground_link1_rz|value(ground_link1_rz) /jointset/link1_link2/link1_link2_rz|value(link1_link2_rz) /jointset/link2_link3/link2_link3_rz|value(link2_link3_rz) /jointset/link3_link4/link3_link4_rz|value(link3_link4_rz) /jointset/link4_link5/link4_link5_rz|value(link4_link5_rz) /jointset/link5_link6/link5_link6_rz|value(link5_link6_rz) /jointset/link6_link7/link6_link7_rz|value(link6_link7_rz) /jointset/link7_link8/link7_link8_rz|value(link7_link8_rz) /jointset/link1_float1/link1_float1_ty|value(link1_float1_ty) /jointset/link2_float2/link2_float2_ty|value(link2_float2_ty) /jointset/link3_float3/link3_float3_ty|value(link3_float3_ty) /jointset/link4_float4/link4_float4_ty|value(link4_float4_ty) /jointset/link5_float5/link5_float5_ty|value(link5_float5_ty) /jointset/link6_float6/link6_float6_ty|value(link6_float6_ty))
  Ground
  BodySet:
    Body link1: mass=0.1 [kg] mass_center=(0 0 0) inertia=(0.0003489583 3.125e-5 0.0003489583 0 0 0)
      Cylinder link1_geom_1: radius=0.025 half_height=0.1
    Body link2: mass=0.1 mass_center=(0 0 0) inertia=(0.0003489583 3.125e-5 0.0003489583 0 0 0)
      Cylinder link2_geom_1: radius=0.025 half_height=0.1
    Body link3: mass=0.1 mass_center=(0 0 0) inertia=(0.0003489583 3.125e-5 0.0003489583 0 0 0)
      Cylinder link3_geom_1: radius=0.025 half_height=0.1
    Body link4: mass=0.1 mass_center=(0 0 0) inertia=(0.0003489583 3.125e-5 0.0003489583 0 0 0)
      Cylinder link4_geom_1: radius=0.025 half_height=0.1
    Body link5: mass=0.1 mass_center=(0 0 0) inertia=(0.0003489583 3.125e-5 0.0003489583 0 0 0)
      Cylinder link5_geom_1: radius=0.025 half_height=0.1
    Body link6: mass=0.1 mass_center=(0 0 0) inertia=(0.0003489583 3.125e-5 0.0003489583 0 0 0)
      Cylinder link6_geom_1: radius=0.025 half_height=0.1
    Body link7: mass=0.1 mass_center=(0 0 0) inertia=(0.0003489583 3.125e-5 0.0003489583 0 0 0)
      Cylinder link7_geom_1: radius=0.025 half_height=0.1
    Body link8: mass=0.1 mass_center=(0 0 0) inertia=(0.0003489583 3.125e-5 0.0003489583 0 0 0)
      Cylinder link8_geom_1: radius=0.025 half_height=0.1
    Body float1: mass=0.0005 mass_center=(0 0 0) inertia=(5e-9 5e-9 5e-9 0 0 0)
      Sphere float1_geom_1: radius=0.005
    Body float2: mass=0.0005 mass_center=(0 0 0) inertia=(5e-9 5e-9 5e-9 0 0 0)
      Sphere float2_geom_1: radius=0.005
    Body float3: mass=0.0005 mass_center=(0 0 0) inertia=(5e-9 5e-9 5e-9 0 0 0)
      Sphere float3_geom_1: radius=0.005
    Body float4: mass=0.0005 mass_center=(0 0 0) inertia=(5e-9 5e-9 5e-9 0 0 0)
      Sphere float4_geom_1: radius=0.005
    Body float5: mass=0.0005 mass_center=(0 0 0) inertia=(5e-9 5e-9 5e-9 0 0 0)
      Sphere float5_geom_1: radius=0.005
    Body float6: mass=0.0005 mass_center=(0 0 0) inertia=(5e-9 5e-9 5e-9 0 0 0)
      Sphere float6_geom_1: radius=0.005
  JointSet:
    CustomJoint ground_link1: socket_parent_frame=ground_offset socket_child_frame=link1_offset
      CoordinateLimitForce ground_link1_rz_LimitForce: coordinate=ground_link1_rz upper_stiffness=0.2 [N*m/degree]
          upper_limit=36 [degrees] lower_stiffness=-0.2 [N*m/degree] lower_limit=-36 [degrees] damping=0.4
          transition=9 [degrees] compute_dissipation_energy=false
      Coordinate ground_link1_rz: range=(-0.7853982 0.7853982)
      PhysicalOffsetFrame ground_offset: socket_parent=/ground translation=(0 1.775 0) [meters]
      PhysicalOffsetFrame link1_offset: socket_parent=/bodyset/link1 translation=(0 0.1125 0)
      SpatialTransform:
        TransformAxis rotation1: axis=(1 0 0)
        TransformAxis rotation2: axis=(0 1 0)
        TransformAxis rotation3: coordinates=ground_link1_rz axis=(0 0 1) LinearFunction(coefficients=1 0)
        TransformAxis translation1: axis=(1 0 0)
        TransformAxis translation2: axis=(0 1 0)
        TransformAxis translation3: axis=(0 0 1)
    CustomJoint link1_link2: socket_parent_frame=link1_offset socket_child_frame=link2_offset
      CoordinateLimitForce link1_link2_rz_LimitForce: coordinate=link1_link2_rz upper_stiffness=0.2 upper_limit=36
          lower_stiffness=-0.2 lower_limit=-36 damping=0.4 transition=9 compute_dissipation_energy=false
      Coordinate link1_link2_rz: range=(-0.7853982 0.7853982)
      PhysicalOffsetFrame link1_offset: socket_parent=/bodyset/link1 translation=(0 -0.1125 0)
      PhysicalOffsetFrame link2_offset: socket_parent=/bodyset/link2 translation=(0 0.1125 0)
      SpatialTransform:
        TransformAxis rotation1: axis=(1 0 0)
        TransformAxis rotation2: axis=(0 1 0)
        TransformAxis rotation3: coordinates=link1_link2_rz axis=(0 0 1) LinearFunction(coefficients=1 0)
        TransformAxis translation1: axis=(1 0 0)
        TransformAxis translation2: axis=(0 1 0)
        TransformAxis translation3: axis=(0 0 1)
    CustomJoint link2_link3: socket_parent_frame=link2_offset socket_child_frame=link3_offset
      CoordinateLimitForce link2_link3_rz_LimitForce: coordinate=link2_link3_rz upper_stiffness=0.2 upper_limit=36
          lower_stiffness=-0.2 lower_limit=-36 damping=0.4 transition=9 compute_dissipation_energy=false
      Coordinate link2_link3_rz: range=(-0.7853982 0.7853982)
      PhysicalOffsetFrame link2_offset: socket_parent=/bodyset/link2 translation=(0 -0.1125 0)
      PhysicalOffsetFrame link3_offset: socket_parent=/bodyset/link3 translation=(0 0.1125 0)
      SpatialTransform:
        TransformAxis rotation1: axis=(1 0 0)
        TransformAxis rotation2: axis=(0 1 0)
        TransformAxis rotation3: coordinates=link2_link3_rz axis=(0 0 1) LinearFunction(coefficients=1 0)
        TransformAxis translation1: axis=(1 0 0)
        TransformAxis translation2: axis=(0 1 0)
        TransformAxis translation3: axis=(0 0 1)
    CustomJoint link3_link4: socket_parent_frame=link3_offset socket_child_frame=link4_offset
      CoordinateLimitForce link3_link4_rz_LimitForce: coordinate=link3_link4_rz upper_stiffness=0.2 upper_limit=36
          lower_stiffness=-0.2 lower_limit=-36 damping=0.4 transition=9 compute_dissipation_energy=false
      Coordinate link3_link4_rz: range=(-0.7853982 0.7853982)
      PhysicalOffsetFrame link3_offset: socket_parent=/bodyset/link3 translation=(0 -0.1125 0)
      PhysicalOffsetFrame link4_offset: socket_parent=/bodyset/link4 translation=(0 0.1125 0)
      SpatialTransform:
        TransformAxis rotation1: axis=(1 0 0)
        TransformAxis rotation2: axis=(0 1 0)
        TransformAxis rotation3: coordinates=link3_link4_rz axis=(0 0 1) LinearFunction(coefficients=1 0)
        TransformAxis translation1: axis=(1 0 0)
        TransformAxis translation2: axis=(0 1 0)
        TransformAxis translation3: axis=(0 0 1)
    CustomJoint link4_link5: socket_parent_frame=link4_offset socket_child_frame=link5_offset
      CoordinateLimitForce link4_link5_rz_LimitForce: coordinate=link4_link5_rz upper_stiffness=0.2 upper_limit=36
          lower_stiffness=-0.2 lower_limit=-36 damping=0.4 transition=9 compute_dissipation_energy=false
      Coordinate link4_link5_rz: range=(-0.7853982 0.7853982)
      PhysicalOffsetFrame link4_offset: socket_parent=/bodyset/link4 translation=(0 -0.1125 0)
      PhysicalOffsetFrame link5_offset: socket_parent=/bodyset/link5 translation=(0 0.1125 0)
      SpatialTransform:
        TransformAxis rotation1: axis=(1 0 0)
        TransformAxis rotation2: axis=(0 1 0)
        TransformAxis rotation3: coordinates=link4_link5_rz axis=(0 0 1) LinearFunction(coefficients=1 0)
        TransformAxis translation1: axis=(1 0 0)
        TransformAxis translation2: axis=(0 1 0)
        TransformAxis translation3: axis=(0 0 1)
    CustomJoint link5_link6: socket_parent_frame=link5_offset socket_child_frame=link6_offset
      CoordinateLimitForce link5_link6_rz_LimitForce: coordinate=link5_link6_rz upper_stiffness=0.2 upper_limit=36
          lower_stiffness=-0.2 lower_limit=-36 damping=0.4 transition=9 compute_dissipation_energy=false
      Coordinate link5_link6_rz: range=(-0.7853982 0.7853982)
      PhysicalOffsetFrame link5_offset: socket_parent=/bodyset/link5 translation=(0 -0.1125 0)
      PhysicalOffsetFrame link6_offset: socket_parent=/bodyset/link6 translation=(0 0.1125 0)
      SpatialTransform:
        TransformAxis rotation1: axis=(1 0 0)
        TransformAxis rotation2: axis=(0 1 0)
        TransformAxis rotation3: coordinates=link5_link6_rz axis=(0 0 1) LinearFunction(coefficients=1 0)
        TransformAxis translation1: axis=(1 0 0)
        TransformAxis translation2: axis=(0 1 0)
        TransformAxis translation3: axis=(0 0 1)
    CustomJoint link6_link7: socket_parent_frame=link6_offset socket_child_frame=link7_offset
      CoordinateLimitForce link6_link7_rz_LimitForce: coordinate=link6_link7_rz upper_stiffness=0.2 upper_limit=36
          lower_stiffness=-0.2 lower_limit=-36 damping=0.4 transition=9 compute_dissipation_energy=false
      Coordinate link6_link7_rz: range=(-0.7853982 0.7853982)
      PhysicalOffsetFrame link6_offset: socket_parent=/bodyset/link6 translation=(0 -0.1125 0)
      PhysicalOffsetFrame link7_offset: socket_parent=/bodyset/link7 translation=(0 0.1125 0)
      SpatialTransform:
        TransformAxis rotation1: axis=(1 0 0)
        TransformAxis rotation2: axis=(0 1 0)
        TransformAxis rotation3: coordinates=link6_link7_rz axis=(0 0 1) LinearFunction(coefficients=1 0)
        TransformAxis translation1: axis=(1 0 0)
        TransformAxis translation2: axis=(0 1 0)
        TransformAxis translation3: axis=(0 0 1)
    CustomJoint link7_link8: socket_parent_frame=link7_offset socket_child_frame=link8_offset
      CoordinateLimitForce link7_link8_rz_LimitForce: coordinate=link7_link8_rz upper_stiffness=0.2 upper_limit=36
          lower_stiffness=-0.2 lower_limit=-36 damping=0.4 transition=9 compute_dissipation_energy=false
      Coordinate link7_link8_rz: range=(-0.7853982 0.7853982)
      PhysicalOffsetFrame link7_offset: socket_parent=/bodyset/link7 translation=(0 -0.1125 0)
      PhysicalOffsetFrame link8_offset: socket_parent=/bodyset/link8 translation=(0 0.1125 0)
      SpatialTransform:
        TransformAxis rotation1: axis=(1 0 0)
        TransformAxis rotation2: axis=(0 1 0)
        TransformAxis rotation3: coordinates=link7_link8_rz axis=(0 0 1) LinearFunction(coefficients=1 0)
        TransformAxis translation1: axis=(1 0 0)
        TransformAxis translation2: axis=(0 1 0)
        TransformAxis translation3: axis=(0 0 1)
    CustomJoint link1_float1: socket_parent_frame=link1_offset socket_child_frame=float1_offset
      Coordinate link1_float1_ty
      PhysicalOffsetFrame link1_offset: socket_parent=/bodyset/link1 translation=(0.025 -0.058 0)
      PhysicalOffsetFrame float1_offset: socket_parent=/bodyset/float1 translation=(0 0 0)
      SpatialTransform:
        TransformAxis rotation1: axis=(1 0 0)
        TransformAxis rotation2: axis=(0 1 0)
        TransformAxis rotation3: axis=(0 0 1)
        TransformAxis translation1: axis=(1 0 0)
        TransformAxis translation2: coordinates=link1_float1_ty axis=(0 1 0) LinearFunction(coefficients=1 0)
        TransformAxis translation3: axis=(0 0 1)
    CustomJoint link2_float2: socket_parent_frame=link2_offset socket_child_frame=float2_offset
      Coordinate link2_float2_ty
      PhysicalOffsetFrame link2_offset: socket_parent=/bodyset/link2 translation=(0.025 -0.058 0)
      PhysicalOffsetFrame float2_offset: socket_parent=/bodyset/float2 translation=(0 0 0)
      SpatialTransform:
        TransformAxis rotation1: axis=(1 0 0)
        TransformAxis rotation2: axis=(0 1 0)
        TransformAxis rotation3: axis=(0 0 1)
        TransformAxis translation1: axis=(1 0 0)
        TransformAxis translation2: coordinates=link2_float2_ty axis=(0 1 0) LinearFunction(coefficients=1 0)
        TransformAxis translation3: axis=(0 0 1)
    CustomJoint link3_float3: socket_parent_frame=link3_offset socket_child_frame=float3_offset
      Coordinate link3_float3_ty
      PhysicalOffsetFrame link3_offset: socket_parent=/bodyset/link3 translation=(0.025 -0.058 0)
      PhysicalOffsetFrame float3_offset: socket_parent=/bodyset/float3 translation=(0 0 0)
      SpatialTransform:
        TransformAxis rotation1: axis=(1 0 0)
        TransformAxis rotation2: axis=(0 1 0)
        TransformAxis rotation3: axis=(0 0 1)
        TransformAxis translation1: axis=(1 0 0)
        TransformAxis translation2: coordinates=link3_float3_ty axis=(0 1 0) LinearFunction(coefficients=1 0)
        TransformAxis translation3: axis=(0 0 1)
    CustomJoint link4_float4: socket_parent_frame=link4_offset socket_child_frame=float4_offset
      Coordinate link4_float4_ty
      PhysicalOffsetFrame link4_offset: socket_parent=/bodyset/link4 translation=(0.025 -0.058 0)
      PhysicalOffsetFrame float4_offset: socket_parent=/bodyset/float4 translation=(0 0 0)
      SpatialTransform:
        TransformAxis rotation1: axis=(1 0 0)
        TransformAxis rotation2: axis=(0 1 0)
        TransformAxis rotation3: axis=(0 0 1)
        TransformAxis translation1: axis=(1 0 0)
        TransformAxis translation2: coordinates=link4_float4_ty axis=(0 1 0) LinearFunction(coefficients=1 0)
        TransformAxis translation3: axis=(0 0 1)
    CustomJoint link5_float5: socket_parent_frame=link5_offset socket_child_frame=float5_offset
      Coordinate link5_float5_ty
      PhysicalOffsetFrame link5_offset: socket_parent=/bodyset/link5 translation=(0.025 -0.058 0)
      PhysicalOffsetFrame float5_offset: socket_parent=/bodyset/float5 translation=(0 0 0)
      SpatialTransform:
        TransformAxis rotation1: axis=(1 0 0)
        TransformAxis rotation2: axis=(0 1 0)
        TransformAxis rotation3: axis=(0 0 1)
        TransformAxis translation1: axis=(1 0 0)
        TransformAxis translation2: coordinates=link5_float5_ty axis=(0 1 0) LinearFunction(coefficients=1 0)
        TransformAxis translation3: axis=(0 0 1)
    CustomJoint link6_float6: socket_parent_frame=link6_offset socket_child_frame=float6_offset
      Coordinate link6_float6_ty
      PhysicalOffsetFrame link6_offset: socket_parent=/bodyset/link6 translation=(0.025 -0.058 0)
      PhysicalOffsetFrame float6_offset: socket_parent=/bodyset/float6 translation=(0 0 0)
      SpatialTransform:
        TransformAxis rotation1: axis=(1 0 0)
        TransformAxis rotation2: axis=(0 1 0)
        TransformAxis rotation3: axis=(0 0 1)
        TransformAxis translation1: axis=(1 0 0)
        TransformAxis translation2: coordinates=link6_float6_ty axis=(0 1 0) LinearFunction(coefficients=1 0)
        TransformAxis translation3: axis=(0 0 1)
  ControllerSet:
    PrescribedController: actuator_list=group1_MTU1
      FunctionSet ControlFunctions:
        StepFunction: transition_start_time=0.1 transition_end_time=1.1 start_value=0.2 end_value=1
  ForceSet:
    Millard2012EquilibriumMuscle group1_MTU1: min_control=0.01 max_control=1 max_isometric_force=1
        optimal_fiber_length=0.158 tendon_slack_length=0.0001 pennation_angle_at_optimal=0 [radians]
        ignore_tendon_compliance=true fiber_damping=0.2 default_fiber_length=0.158
      PathPoint group1_MTU1_pt1: link1 (0.025 0.1 0)
      PathPoint group1_MTU1_pt2: float1 (0 0 0)
      ActiveForceLengthCurve: minimum_value=0
      ForceVelocityCurve: concentric_slope_at_vmax=0 concentric_slope_near_vmax=0.25 isometric_slope=5
          eccentric_slope_at_vmax=0 eccentric_slope_near_vmax=0.15 max_eccentric_velocity_force_multiplier=1.4
      FiberForceLengthCurve
      TendonForceLengthCurve
    Ligament group1_ligament1: resting_length=0.067 pcsa_force=0.1428571
      PathPoint group1_ligament1_pt1: float1 (0 0 0)
      PathPoint group1_ligament1_pt2: link1 (0.025 -0.1 0)
      PathPoint group1_ligament1_pt3: link2 (0.025 0.1 0)
      TendonForceLengthCurve force_length_curve
    Ligament group1_ligament10: resting_length=0.225 pcsa_force=0.2857143
      PathPoint group1_ligament10_pt1: float5 (0 0 0)
      PathPoint group1_ligament10_pt2: link5 (0.025 -0.1 0)
      PathPoint group1_ligament10_pt3: link6 (0.025 0.1 0)
      PathPoint group1_ligament10_pt4: float6 (0 0 0)
      TendonForceLengthCurve force_length_curve
    Ligament group1_ligament11: resting_length=0.067 pcsa_force=0.1428571
      PathPoint group1_ligament11_pt1: float6 (0 0 0)
      PathPoint group1_ligament11_pt2: link6 (0.025 -0.1 0)
      PathPoint group1_ligament11_pt3: link7 (0.025 0.1 0)
      TendonForceLengthCurve force_length_curve
    Ligament group1_ligament12: resting_length=0.292 pcsa_force=0.1428571
      PathPoint group1_ligament12_pt1: float6 (0 0 0)
      PathPoint group1_ligament12_pt2: link6 (0.025 -0.1 0)
      PathPoint group1_ligament12_pt3: link7 (0.025 0.1 0)
      PathPoint group1_ligament12_pt4: link7 (0.025 -0.058 0)
      PathPoint group1_ligament12_pt5: link7 (0.025 -0.1 0)
      PathPoint group1_ligament12_pt6: link8 (0.025 0.1 0)
      TendonForceLengthCurve force_length_curve
    Ligament group1_ligament2: resting_length=0.225 pcsa_force=0.8571429
      PathPoint group1_ligament2_pt1: float1 (0 0 0)
      PathPoint group1_ligament2_pt2: link1 (0.025 -0.1 0)
      PathPoint group1_ligament2_pt3: link2 (0.025 0.1 0)
      PathPoint group1_ligament2_pt4: float2 (0 0 0)
      TendonForceLengthCurve force_length_curve
    Ligament group1_ligament3: resting_length=0.225 pcsa_force=0.7142857
      PathPoint group1_ligament3_pt1: float2 (0 0 0)
      PathPoint group1_ligament3_pt2: link2 (0.025 -0.1 0)
      PathPoint group1_ligament3_pt3: link3 (0.025 0.1 0)
      PathPoint group1_ligament3_pt4: float3 (0 0 0)
      TendonForceLengthCurve force_length_curve
    Ligament group1_ligament4: resting_length=0.067 pcsa_force=0.1428571
      PathPoint group1_ligament4_pt1: float2 (0 0 0)
      PathPoint group1_ligament4_pt2: link2 (0.025 -0.1 0)
      PathPoint group1_ligament4_pt3: link3 (0.025 0.1 0)
      TendonForceLengthCurve force_length_curve
    Ligament group1_ligament5: resting_length=0.067 pcsa_force=0.1428571
      PathPoint group1_ligament5_pt1: float3 (0 0 0)
      PathPoint group1_ligament5_pt2: link3 (0.025 -0.1 0)
      PathPoint group1_ligament5_pt3: link4 (0.025 0.1 0)
      TendonForceLengthCurve force_length_curve
    Ligament group1_ligament6: resting_length=0.225 pcsa_force=0.5714286
      PathPoint group1_ligament6_pt1: float3 (0 0 0)
      PathPoint group1_ligament6_pt2: link3 (0.025 -0.1 0)
      PathPoint group1_ligament6_pt3: link4 (0.025 0.1 0)
      PathPoint group1_ligament6_pt4: float4 (0 0 0)
      TendonForceLengthCurve force_length_curve
    Ligament group1_ligament7: resting_length=0.067 pcsa_force=0.1428571
      PathPoint group1_ligament7_pt1: float4 (0 0 0)
      PathPoint group1_ligament7_pt2: link4 (0.025 -0.1 0)
      PathPoint group1_ligament7_pt3: link5 (0.025 0.1 0)
      TendonForceLengthCurve force_length_curve
    Ligament group1_ligament8: resting_length=0.225 pcsa_force=0.4285714
      PathPoint group1_ligament8_pt1: float4 (0 0 0)
      PathPoint group1_ligament8_pt2: link4 (0.025 -0.1 0)
      PathPoint group1_ligament8_pt3: link5 (0.025 0.1 0)
      PathPoint group1_ligament8_pt4: float5 (0 0 0)
      TendonForceLengthCurve force_length_curve
    Ligament group1_ligament9: resting_length=0.067 pcsa_force=0.1428571
      PathPoint group1_ligament9_pt1: float5 (0 0 0)
      PathPoint group1_ligament9_pt2: link5 (0.025 -0.1 0)
      PathPoint group1_ligament9_pt3: link6 (0.025 0.1 0)
      TendonForceLengthCurve force_length_curve
