# OpenSim document version 40000
Model Hello_ArborSim:
  gravity: 0 0 0
  Ground
  BodySet:
    Body link1: mass=1 [kg] mass_center=(0 0 0) inertia=(0.02145833 0.00125 0.02145833 0 0 0)
      Cylinder link1_geom_1: radius=0.05 half_height=0.25
    Body link2: mass=1 mass_center=(0 0 0) inertia=(0.02145833 0.00125 0.02145833 0 0 0)
      Cylinder link2_geom_1: radius=0.05 half_height=0.25
    Body link3: mass=1 mass_center=(0 0 0) inertia=(0.02145833 0.00125 0.02145833 0 0 0)
      Cylinder link3_geom_1: radius=0.05 half_height=0.25
  JointSet:
    CustomJoint ground_link1: socket_parent_frame=ground_offset socket_child_frame=link1_offset
      Coordinate ground_link1_rz: range=(-1.570796 1.570796)
      PhysicalOffsetFrame ground_offset: socket_parent=/ground translation=(0 2 0) [meters]
      PhysicalOffsetFrame link1_offset: socket_parent=/bodyset/link1 translation=(0 0.25 0)
      SpatialTransform:
        TransformAxis rotation1: axis=(1 0 0)
        TransformAxis rotation2: axis=(0 1 0)
        TransformAxis rotation3: coordinates=ground_link1_rz axis=(0 0 1) LinearFunction(coefficients=1 0)
        TransformAxis translation1: axis=(1 0 0)
        TransformAxis translation2: axis=(0 1 0)
        TransformAxis translation3: axis=(0 0 1)
    CustomJoint link1_link2: socket_parent_frame=link1_offset socket_child_frame=link2_offset
      Coordinate link1_link2_rz: range=(-1.570796 1.570796)
      PhysicalOffsetFrame link1_offset: socket_parent=/bodyset/link1 translation=(0 -0.3 0)
      PhysicalOffsetFrame link2_offset: socket_parent=/bodyset/link2 translation=(0 0.3 0)
      SpatialTransform:
        TransformAxis rotation1: axis=(1 0 0)
        TransformAxis rotation2: axis=(0 1 0)
        TransformAxis rotation3: coordinates=link1_link2_rz axis=(0 0 1) LinearFunction(coefficients=1 0)
        TransformAxis translation1: axis=(1 0 0)
        TransformAxis translation2: axis=(0 1 0)
        TransformAxis translation3: axis=(0 0 1)
    CustomJoint link2_link3: socket_parent_frame=link2_offset socket_child_frame=link3_offset
      Coordinate link2_link3_rz: range=(-1.570796 1.570796)
      PhysicalOffsetFrame link2_offset: socket_parent=/bodyset/link2 translation=(0 -0.3 0)
      PhysicalOffsetFrame link3_offset: socket_parent=/bodyset/link3 translation=(0 0.3 0)
      SpatialTransform:
        TransformAxis rotation1: axis=(1 0 0)
        TransformAxis rotation2: axis=(0 1 0)
        TransformAxis rotation3: coordinates=link2_link3_rz axis=(0 0 1) LinearFunction(coefficients=1 0)
        TransformAxis translation1: axis=(1 0 0)
        TransformAxis translation2: axis=(0 1 0)
        TransformAxis translation3: axis=(0 0 1)
  ForceSet:
    Millard2012EquilibriumMuscle mtu1: min_control=0.01 max_control=1 max_isometric_force=1 optimal_fiber_length=0.85
        tendon_slack_length=0.125 pennation_angle_at_optimal=0 [radians] default_fiber_length=0.85
      PathPoint mtu1_pt1: link1 (0.05 0.25 0)
      PathPoint mtu1_pt2: link1 (0.05 -0.25 0)
      PathPoint mtu1_pt3: link2 (0.05 0.25 0)
      PathPoint mtu1_pt4: link2 (0.05 0 0)
      PathPoint mtu1_pt5: link2 (0.05 -0.125 0)
      ActiveForceLengthCurve: minimum_value=0
      ForceVelocityCurve: concentric_slope_at_vmax=0 concentric_slope_near_vmax=0.25 isometric_slope=5
          eccentric_slope_at_vmax=0 eccentric_slope_near_vmax=0.15 max_eccentric_velocity_force_multiplier=1.4
      FiberForceLengthCurve
      TendonForceLengthCurve
    Millard2012EquilibriumMuscle mtu2: min_control=0.01 max_control=1 max_isometric_force=1 optimal_fiber_length=0.85
        tendon_slack_length=0.475 pennation_angle_at_optimal=0 default_fiber_length=0.85
      PathPoint mtu2_pt1: link1 (0.05 0.25 0)
      PathPoint mtu2_pt2: link1 (0.05 -0.25 0)
      PathPoint mtu2_pt3: link2 (0.05 0.25 0)
      PathPoint mtu2_pt4: link2 (0.05 0 0)
      PathPoint mtu2_pt5: link2 (0.05 -0.25 0)
      PathPoint mtu2_pt6: link3 (0.05 0.25 0)
      PathPoint mtu2_pt7: link3 (0.05 0.125 0)
      ActiveForceLengthCurve: minimum_value=0
      ForceVelocityCurve: concentric_slope_at_vmax=0 concentric_slope_near_vmax=0.25 isometric_slope=5
          eccentric_slope_at_vmax=0 eccentric_slope_near_vmax=0.15 max_eccentric_velocity_force_multiplier=1.4
      FiberForceLengthCurve
      TendonForceLengthCurve
